#----- Initialize Simulation -----
clear
units           metal
boundary        p p p
atom_style      full
bond_style      none
variable        etol equal 1e-25
variable        ftol equal 1e-25
variable        maxiter equal 5000
variable        maxeval equal 10000
variable        probeTemp equal PROBETEMP

#----- Create Atoms -----
read_data       beryl_water_NN_q_def.mod
replicate       1 1 1
group           water type 5 6
compute         peratom water pe/atom
compute         pe water reduce sum c_peratom
thermo_style    custom step c_pe

#----- Define Interatomic Potential -----
include         ../potential_main.mod
include         ../potential_beryl.mod
include         ../potential_water.mod

#fix BRX all box/relax iso 1.013
#minimize        1e-6 1e-6 5000 10000 # Performs actual minimization
timestep        0
fix		2 water shake 0.0001 20 100  b 1 a 1
run    		0
